A := [4.35, 4.39, 3.67; 4.04, 3.65, 3.17; 3.14, 2.69, 2.17]
b := [40.15; 36.82; 28.10]
L11 := sqrt(4.35)
L21 := 4.39/sqrt(4.35)
L31 := 3.67/sqrt(3.35)
L22 := sqrt(3.65 - L21^2)
L32 := (2.69 - L21*L31)/L22
L33 := sqrt(2.17 - L31^2 - L31^2)
L := [L11; L21; L31]
LT := [L22; L32; L33]
AA
L*transpose(LT) = [1.84244i, 3.61349i, 5.05366i; 1.85939i, 3.64672i, 5.10013i; 1.7713i, 3.47397i, 4.85853i]
