A := [5, 2, 1; 1, 6, 1; 1, 1, 1]
b := [40.15; 36.82; 28.10]
L := cholesky(A)
transpose(L) = [2.23607, 0.894427, 0.447214; 0, 2.28035, 0.263117; 0, 0, 0.85485]
L = [2.23607, 0, 0; 0.894427, 2.28035, 0; 0.447214, 0.263117, 0.85485]
AA := L*transpose(L)
Ly := [2.236; 0.894; 0.447]
Lx := [2.236; 0.894; 0.447]
Ly + Lx = [4.472; 1.788; 0.894]
