# ORIGIN := 1
n := 4
A := [4.07, 3.79, 3.37; 2.84, 2.44, 1.95; 4.99, 4.50, 3.97]
B := [40.77; 27.68; 49.37]
E := identity(n) → [1, 0, 0, 0; 0, 1, 0, 0; 0, 0, 1, 0; 0, 0, 0, 1]
AR := augment(A, B) → [4.07, 3.79, 3.37, 40.77; 2.84, 2.44, 1.95, 27.68; 4.99, 4.5, 3.97, 49.37]
rank(A) → 3
rank(AR) → 3
AG := rref(AR) → [1.0, 0.0, 0.0, 6.00657825843; 0, 1.0, 0.0, 4.76216406614; 0, 0, 1.0, -0.51198080786]
