A := [
    17.30, 0.0741, 0.0892, 0.1043;
    0.0539, 16.4, 0.0841, 0.0992;
    0.0488, 0.0639, 15.5, 0.0941;
    0.0437, 0.0588, 0.0739, 14.6
]
b := [28.2215; 29.9928; 31.4001; 32.4435]
x := [0; 0; 0; 0]
Given
A*x == b
Find(x) = [1.60002; 1.80001; 2; 2.2]
